// SBML level 3 version 1

model BIOMD0000000204_new()

  // Compartments:
  compartment compartment = 1;

  // Species:
  species $degradation in compartment = 0;
  species $NANOG_Gene in compartment = 0;
  species $targetGene in compartment = 0.01;
  species $SOX2 in compartment = 0.01;
  species $NANOG in compartment = 0.01;
  species $OCT4_Gene in compartment = 0;
  species $SOX2_Gene in compartment = 0;
  species OCT4_SOX2 in compartment = 0.1;
  species $A in compartment = 10;
  species Protein in compartment = 0; Protein is "Target Gene";
  species $p53 in compartment = 0;
  species $OCT4 in compartment = 0.01;

  // Parameters:
  a3 = 0.5;
  eta1 = 0.0001;
  eta3 = 0.0001;
  eta5 = 0.0001;
  f1 = 0.001;
  f2 = 0.001;
  eta7 = 0.0001;
  f3 = 0.05;
  b1 = 0.0011;
  b2 = 0.001;
  b3 = 0.001;
  k3c = 5;
  f = 1000;
  e1 = 0.01;
  e2 = 0.1;
  a1 = 1;
  a2 = 0.01;
  h2 = 1;
  d1 = 0.0011;
  d2 = 0.001;
  d3 = 0.001;
  k1c = 0.05;
  h1 = 0.0011;
  gamma3 = 1;
  gamma4 = 0.01;
  gamma1 = 1;
  gamma2 = 1;
  g1 = 0.1;
  c1 = 1;
  k2c = 0.001;
  c2 = 0.01;
  c3 = 0.5;

  // Rate rules:
  degradation' = 0;
  NANOG_Gene' = 0;
  targetGene' = 0;
  OCT4_Gene' = 0;
  SOX2_Gene' = 0;
  A' = 0;
  p53' = 0;

  // Reactions:
  J6: $SOX2_Gene -> $SOX2; (eta3 + c1*A + c2*OCT4_SOX2 + c3*OCT4_SOX2*NANOG)/(1 + eta3/f + d1*A + d2*OCT4_SOX2 + d3*OCT4_SOX2*NANOG);  // modifiers: A, NANOG, OCT4_SOX2
  J1: $OCT4 -> $degradation; gamma1*OCT4;
  J7: $SOX2 -> $degradation; gamma3*SOX2;
  J0: $OCT4_Gene -> $OCT4; (eta1 + a1*A + a2*OCT4_SOX2 + a3*OCT4_SOX2*NANOG)/(1 + eta1/f + b1*A + b2*OCT4_SOX2 + b3*OCT4_SOX2*NANOG);  // modifiers: A, NANOG, OCT4_SOX2
  J3: $NANOG -> $degradation; gamma2*NANOG;
  J4: $SOX2 + $OCT4 -> OCT4_SOX2; k1c*OCT4*SOX2 - k2c*OCT4_SOX2;
  J2: $NANOG_Gene -> $NANOG; (eta5 + e1*OCT4_SOX2 + e2*OCT4_SOX2*NANOG)/(1 + eta5/f + f2*OCT4_SOX2 + f1*OCT4_SOX2*NANOG + f3*p53);  // modifiers: p53, OCT4_SOX2
  J9: Protein -> $degradation; gamma4*Protein;
  J5: OCT4_SOX2 -> $degradation; k3c*OCT4_SOX2;
  J8: $targetGene -> Protein; (g1*OCT4_SOX2 + eta7)/(1 + eta7/f2 + h1*OCT4_SOX2 + h2*OCT4_SOX2*NANOG);  // modifiers: NANOG, OCT4_SOX2

  // Unit definitions:
  unit Time = 1;
  unit Volume = 1;
  unit substance_per_volume = 1;
  unit substance_per_time = 1 / second;
  unit substance = 1;
end
